<?xml version="1.0" encoding="UTF-8"?>
<?xml-stylesheet type="text/xsl"
href="http://jsbsim.sourceforge.net/JSBSim.xsl"?>
<fdm_config name="airwaveXtreme150 hang glider" release="ALPHA" version="2.0"
    xsi:noNamespaceSchemaLocation="http://jsbsim.sourceforge.net/JSBSim.xsd"
    xmlns:xsi="http://www.w3.org/2001/XMLSchema-instance"
    xmlns:xs="http://www.w3.org/2001/XMLSchema">

  <fileheader>
    <author> D-NXKT </author>
    <email> d_nxkt@yahoo.de </email>
    <filecreationdate> 2012-06-10 </filecreationdate>
    <version> $Version 1.1 $ </version>
    <description> Models a hang glider (conversion from UIUC-FDM) </description>
    <note> v1.0: conversion from UIUC</note>
    <note> v1.1: enable tumbling, winch, aerotow</note>
    <limitation> realistic only for positive g-forces</limitation>
    <documentation>
       realistic glide ratio between 9 and 15 (novice HG - high performance HG)
    </documentation>
    <reference>
       /Aircraft/UIUC/airwaveXtreme150-v1-nl/README.airwaveXtreme150.html
       /Aircraft/UIUC/airwaveXtreme150-v1-nl/aircraft.dat
       /Aircraft/UIUC/airwaveXtreme150-v1-nl/CDfade.dat
       /Aircraft/UIUC/airwaveXtreme150-v1-nl/CLfade.dat
       /Aircraft/UIUC/airwaveXtreme150-v1-nl/Cmfade.dat
    </reference>
  </fileheader>

  <metrics>

    <wingarea unit="FT2">154.0</wingarea>
    <wingspan unit="FT">33.6666</wingspan>
    <wing_incidence>0.00</wing_incidence>
    <chord unit="FT">4.75</chord>

    <location name="AERORP" unit="M">
      <x>0.</x>
      <y>0.</y>
      <z>0.</z>
    </location>

    <location name="EYEPOINT" unit="M">
      <x>0.0</x>
      <y>0.0</y>
      <z>0.0</z>
    </location>

    <location name="VRP" unit="M">
      <x>0.</x>
      <y>0.</y>
      <z>0.</z>
    </location>

  </metrics>

  <mass_balance>

    <ixx unit="SLUG*FT2">219.3</ixx>
    <iyy unit="SLUG*FT2">95.6</iyy>
    <izz unit="SLUG*FT2">190.4</izz>
    <ixz unit="SLUG*FT2">8.8</ixz>

    <emptywt unit="LBS">75.</emptywt>   <!-- 34.0 kg -->
    <location name="CG" unit="M">
      <x>0.</x>
      <y>0.</y>
      <z>0.</z>
    </location>

    <pointmass name="pilot">
      <weight unit="LBS">200.</weight>  <!-- 90.7 kg -->
      <location name="POINTMASS" unit="M">
        <x>0.</x>
        <y>0.</y>
        <z>0.</z>
      </location>
    </pointmass>

  </mass_balance>

  <ground_reactions>

    <contact name="NOSE_LEFT" type="BOGEY">
      <location unit="FT">
        <x>-1.85</x>
        <y>-1.25</y>
        <z>-4.1</z>
      </location>
      <static_friction>1.50</static_friction>
      <dynamic_friction>0.800</dynamic_friction>
      <rolling_friction>0.0200</rolling_friction>
      <spring_coeff unit="N/M">5000.</spring_coeff>
      <damping_coeff unit="N/M/SEC">386.32</damping_coeff>
      <max_steer unit="DEG">0</max_steer>
      <brake_group>NONE</brake_group>
      <retractable>1</retractable>
    </contact>

    <contact name="NOSE_Right" type="BOGEY">
      <location unit="FT">
        <x>-1.85</x>
        <y>1.25</y>
        <z>-4.1</z>
      </location>
      <static_friction>1.50</static_friction>
      <dynamic_friction>0.800</dynamic_friction>
      <rolling_friction>0.0200</rolling_friction>
      <spring_coeff unit="N/M">5000.</spring_coeff>
      <damping_coeff unit="N/M/SEC">386.32</damping_coeff>
      <max_steer unit="DEG">0</max_steer>
      <brake_group>NONE</brake_group>
      <retractable>1</retractable>
    </contact>

    <contact name="LEFT_MAIN" type="BOGEY">
      <location unit="FT">
        <x>1.85</x>
        <y>-1.25</y>
        <z>-4.1</z>
      </location>
      <static_friction>1.50</static_friction>
      <dynamic_friction>0.800</dynamic_friction>
      <rolling_friction>0.0200</rolling_friction>
      <spring_coeff unit="N/M">5000.</spring_coeff>
      <damping_coeff unit="N/M/SEC">771.04</damping_coeff>
      <max_steer unit="DEG">0</max_steer>
      <brake_group>LEFT</brake_group>
      <retractable>1</retractable>
    </contact>

    <contact name="RIGHT_MAIN" type="BOGEY">
      <location unit="FT">
        <x>1.85</x>
        <y>1.25</y>
        <z>-4.1</z>
      </location>
      <static_friction>1.50</static_friction>
      <dynamic_friction>0.800</dynamic_friction>
      <rolling_friction>0.0200</rolling_friction>
      <spring_coeff unit="N/M">5000.</spring_coeff>
      <damping_coeff unit="N/M/SEC">771.04</damping_coeff>
      <max_steer unit="DEG">0</max_steer>
      <brake_group>RIGHT</brake_group>
      <retractable>1</retractable>
    </contact>

    <contact name="LEFT_Speedbar" type="STRUCTURE">
      <location unit="FT">
        <x>-1.64</x>
        <y>-2.53</y>
        <z>-1.77</z> <!-- correct would be <z>-1.57</z> -->
      </location>
      <static_friction>1.80</static_friction>
      <dynamic_friction>1.50</dynamic_friction>
      <spring_coeff unit="N/M">10000.</spring_coeff>
      <damping_coeff unit="N/M/SEC">800.</damping_coeff>
      <damping_coeff_rebound unit="N/M/SEC">2000.</damping_coeff_rebound>
    </contact>

    <contact name="RIGHT_Speedbar" type="STRUCTURE">
      <location unit="FT">
        <x>-1.64</x>
        <y>2.53</y>
        <z>-1.77</z>
      </location>
      <static_friction>1.80</static_friction>
      <dynamic_friction>1.50</dynamic_friction>
      <spring_coeff unit="N/M">10000.</spring_coeff>
      <damping_coeff unit="N/M/SEC">800.</damping_coeff>
      <damping_coeff_rebound unit="N/M/SEC">2000.</damping_coeff_rebound>
    </contact>

    <contact name="Keel_Front" type="STRUCTURE">
      <location unit="FT">
        <x>-4.92</x>
        <y>0.</y>
        <z>3.608</z>
      </location>
      <static_friction>0.80</static_friction>
      <dynamic_friction>0.50</dynamic_friction>
      <spring_coeff unit="N/M">10000.</spring_coeff>
      <damping_coeff unit="N/M/SEC">1200.</damping_coeff>  <!-- 800 double bounce -->
    </contact>

    <contact name="Keel_Aft" type="STRUCTURE">
      <location unit="FT">
        <x>6.30</x>
        <y>0.</y>
        <z>0.32</z>
      </location>
      <static_friction>0.80</static_friction>
      <dynamic_friction>0.50</dynamic_friction>
      <spring_coeff unit="N/M">10000.</spring_coeff>
      <damping_coeff unit="N/M/SEC">800.</damping_coeff>
    </contact>

    <contact name="LEFT_WING" type="STRUCTURE">
      <location unit="FT">
        <x>3.28</x>
        <y>-16.9</y>
        <z>1.48</z>
      </location>
      <static_friction>0.80</static_friction>
      <dynamic_friction>0.50</dynamic_friction>
      <spring_coeff unit="N/M">3857.28</spring_coeff>
      <damping_coeff unit="N/M/SEC">771.04</damping_coeff>
    </contact>

    <contact name="RIGHT_WING" type="STRUCTURE">
      <location unit="FT">
        <x>3.28</x>
        <y>16.9</y>
        <z>1.48</z>
      </location>
      <static_friction>0.80</static_friction>
      <dynamic_friction>0.50</dynamic_friction>
      <spring_coeff unit="N/M">3857.28</spring_coeff>
      <damping_coeff unit="N/M/SEC">771.04</damping_coeff>
    </contact>

    <contact name="WHEEL_LEFT" type="BOGEY">
      <location unit="M">
        <x>-0.477</x>
        <y>-0.675</y>
        <z>-0.574</z>
      </location>
      <static_friction>0.800</static_friction>
      <dynamic_friction>0.500</dynamic_friction>
      <rolling_friction>0.0200</rolling_friction>
      <spring_coeff unit="N/M">120000.</spring_coeff>
      <damping_coeff unit="N/M/SEC">5000.</damping_coeff>
      <max_steer unit="DEG">0</max_steer>
      <brake_group>NONE</brake_group>
      <retractable>0</retractable>
    </contact>

    <contact name="WHEEL_RIGHT" type="BOGEY">
      <location unit="M">
        <x>-0.477</x>
        <y>0.675</y>
        <z>-0.574</z>
      </location>
      <static_friction>0.800</static_friction>
      <dynamic_friction>0.500</dynamic_friction>
      <rolling_friction>0.0200</rolling_friction>
      <spring_coeff unit="N/M">120000.</spring_coeff>
      <damping_coeff unit="N/M/SEC">5000.</damping_coeff>
      <max_steer unit="DEG">0</max_steer>
      <brake_group>NONE</brake_group>
      <retractable>0</retractable>
    </contact>

    <contact name="Kingpost" type="STRUCTURE">
      <location unit="M">
        <x>0.115</x>
        <y>0.</y>
        <z>1.725</z>
      </location>
      <static_friction>0.80</static_friction>
      <dynamic_friction>0.50</dynamic_friction>
      <spring_coeff unit="N/M">10000.</spring_coeff>
      <damping_coeff unit="N/M/SEC">800.</damping_coeff>
    </contact>

  </ground_reactions>


  <external_reactions>

   <!-- external forces, for groundhandling -->
    <force name="walkforward" frame="BODY">
      <location unit="M">
        <x>1.8</x>
        <y>0.0</y>
        <z>-1.</z>
      </location>

      <direction>
        <x>1.0</x>
        <y>0.0</y>
        <z>0.0</z>
      </direction>
    </force>

    <force name="turn" frame="BODY">
      <location unit="M">
        <x>10.</x>
        <y>0.0</y>
        <z>-1.5</z>
      </location>

      <direction>
        <x>0.0</x>
        <y>1.0</y>
        <z>0.0</z>
      </direction>
    </force>

   <!-- external forces, parachute -->
    <force name="parachute" frame="WIND">
      <function>
        <product>
          <p>aero/qbar-psf</p>
          <pow>
            <p>fcs/parachute-pos-norm</p>
            <v>4</v>
          </pow>
          <v>2.45</v>  <!-- Full drag coefficient 2.45 -->
          <v>344.4</v> <!-- Full parachute area 32m^2-->
        </product>
      </function>

      <location unit="M">
        <x>0.4</x>
        <y>0.0</y>
        <z>0.6</z>
      </location>

      <direction>
        <x>-1.0</x>
        <y>0.0</y>
        <z>0.0</z>
      </direction>
    </force>

    <force name="GenericEngine" frame="BODY">
      <location unit="M">
        <x>0.0</x>
        <y>0.0</y>
        <z>0.0</z>
      </location>

      <direction>
        <x>1.0</x>
        <y>0.0</y>
        <z>0.0</z>
      </direction>
    </force>

    <!-- external forces for winch start, aerotowing and dropping -->
    <force name="chest" frame="BODY" unit="LBS" >
      <location unit="M">
        <x>-0.25</x>
        <y> 0.0</y>
        <z>-0.3</z>
      </location>
      <direction>
        <x>0.0</x>
        <y>0.0</y>
        <z>0.0</z>
      </direction>
    </force>

    <force name="belly" frame="BODY" unit="LBS" >
      <location unit="M">
        <x> 0.0</x>
        <y> 0.0</y>
        <z>-0.39</z>
      </location>
      <direction>
        <x>0.0</x>
        <y>0.0</y>
        <z>0.0</z>
      </direction>
    </force>

    <force name="drop" frame="BODY" unit="LBS" >
      <location unit="M">
        <x> 0.2</x>
        <y> 0.0</y>
        <z> 0.6</z>
      </location>
      <direction>
        <x>0.0</x>
        <y>0.0</y>
        <z>0.0</z>
      </direction>
    </force>

  </external_reactions>

  <propulsion>
     <!-- generic engine used (defined in external_reactions) -->
  </propulsion>

  <flight_control name="FCS: airwaveXtreme150">

    <channel name="Pitch">

      <summer name="Pitch Trim Sum">
        <input>fcs/elevator-cmd-norm</input>
        <input>fcs/pitch-trim-cmd-norm</input>
        <clipto>
          <min>-1</min>
          <max>1</max>
        </clipto>
      </summer>

      <aerosurface_scale name="Elevator Control">
        <input>fcs/pitch-trim-sum</input>
        <range>
          <min>-0.0183259</min>
          <max>0.0183259</max>
        </range>
        <output>fcs/elevator-pos-rad</output>
      </aerosurface_scale>

      <aerosurface_scale name="elevator normalization">
        <input>fcs/elevator-pos-rad</input>
        <domain>
          <min>-0.0183259</min>
          <max>0.0183259</max>
        </domain>
        <range>
          <min>-1</min>
          <max>1</max>
        </range>
        <output>fcs/elevator-pos-norm</output>
      </aerosurface_scale>

    </channel>

    <channel name="Roll">

      <aerosurface_scale name="Left Aileron Control">
        <input>fcs/aileron-cmd-norm</input>
        <range>
          <min>-0.349</min>
          <max>+0.349</max>
        </range>
        <output>fcs/left-aileron-pos-rad</output>
      </aerosurface_scale>

      <aerosurface_scale name="left aileron normalization">
        <input>fcs/left-aileron-pos-rad</input>
        <domain>
          <min>-0.349</min>
          <max>0.349</max>
        </domain>
        <range>
          <min>-1</min>
          <max>1</max>
        </range>
        <output>fcs/left-aileron-pos-norm</output>
      </aerosurface_scale>

    </channel>

    <channel name="Yaw">

      <summer name="Rudder Command Sum">
        <input>fcs/rudder-cmd-norm</input>
        <input>fcs/yaw-trim-cmd-norm</input>
        <clipto>
          <min>-1.</min>
          <max>1.</max>
        </clipto>
      </summer>

      <aerosurface_scale name="Rudder Control">
        <input>fcs/rudder-command-sum</input>
        <range>
          <min>-0.436</min>
          <max>0.436</max>
        </range>
        <output>fcs/rudder-pos-rad</output>
      </aerosurface_scale>

      <aerosurface_scale name="rudder normalization">
        <input>fcs/rudder-pos-rad</input>
        <domain>
          <min>-0.436</min>
          <max>0.436</max>
        </domain>
        <range>
          <min>-1</min>
          <max>1</max>
        </range>
        <output>fcs/rudder-pos-norm</output>
      </aerosurface_scale>
    </channel>

    <channel name="Landing Gear">
      <kinematic name="Gear Control">
        <input>gear/gear-cmd-norm</input>
        <traverse>
          <setting>
            <position>0</position>
            <time>0</time>
          </setting>
          <setting>
            <position>1</position>
            <time>1</time>
          </setting>
        </traverse>
        <output>gear/gear-pos-norm</output>
      </kinematic>
    </channel>

    <channel name="Parachute">
      <kinematic name="fcs/parachute-deployment-control">
        <input>/controls/engines/engine/magnetos</input>
        <traverse>
          <setting>
            <position>0</position>
            <time>0</time>
          </setting>
          <setting>
            <position>1</position>
            <time>2</time>
          </setting>
        </traverse>
        <!-- <output>fcs/parachute-pos-norm</output> -->
      </kinematic>

      <fcs_function name="fcs/parachute-pos-norm">
        <function>
          <description>velocity dependent deployment time</description>
          <pow>
            <property>fcs/parachute-deployment-control</property>
            <quotient>
              <value>40.</value>
              <property>velocities/vtrue-fps</property>
            </quotient>
          </pow>
        </function>
        <clipto>
          <min>0</min>
          <max>1</max>
        </clipto>
      </fcs_function>
    </channel>

  </flight_control>

  <aerodynamics>

    <axis name="LIFT">
      <function name="aero/coefficient/CLalpha">
        <description>Lift_due_to_alpha</description>
        <product>
          <property>aero/qbar-psf</property>
          <property>metrics/Sw-sqft</property>
          <table>
            <independentVar
            lookup="row">aero/alpha-eff-deg</independentVar>

            <independentVar
            lookup="column">fcs/elevator-pos-deg</independentVar>

            <tableData>
                             -1.05       -0.90       -0.75       -0.6        -0.45       -0.3        -0.15       0.0         0.15        0.3         0.45        0.6         0.75        0.9         1.05
               -180.000000    0.594000    0.606000    0.618000    0.630000    0.535500    0.441000    0.346500   0.252000    0.157500    0.063000   -0.031000   -0.124000   -0.217000   -0.310000   -0.403000
               -160.000000    0.586250    0.582500    0.578750    0.575000    0.571250    0.567500    0.563750   0.560000    0.556250    0.552500    0.554000    0.566000    0.578000    0.590000    0.602000
               -140.000000    0.513000    0.522000    0.531000    0.540000    0.549000    0.558000    0.567000   0.576000    0.585000    0.594000    0.598750    0.595000    0.591250    0.587500    0.583750
               -120.000000    0.248000    0.272000    0.296000    0.320000    0.344000    0.368000    0.392000   0.416000    0.440000    0.464000    0.483000    0.492000    0.501000    0.510000    0.519000
               -100.000000   -0.063000   -0.042000   -0.021000    0.000000    0.024000    0.048000    0.072000   0.096000    0.120000    0.144000    0.168000    0.192000    0.216000    0.240000    0.264000
                -80.000000   -0.325000   -0.310000   -0.295000   -0.280000   -0.259000   -0.238000   -0.217000  -0.196000   -0.175000   -0.154000   -0.133000   -0.112000   -0.091000   -0.070000   -0.049000
                -60.000000   -0.561000   -0.534000   -0.507000   -0.480000   -0.465000   -0.450000   -0.435000  -0.420000   -0.405000   -0.390000   -0.375000   -0.360000   -0.345000   -0.330000   -0.315000
                -40.000000   -0.775000   -0.790000   -0.805000   -0.820000   -0.796000   -0.772000   -0.748000  -0.724000   -0.700000   -0.676000   -0.651000   -0.624000   -0.597000   -0.570000   -0.543000
                -20.000000   -0.089856   -0.171543   -0.253229   -0.334916   -0.416602   -0.498289   -0.579976  -0.621796   -0.658623   -0.695449   -0.725000   -0.740000   -0.755000   -0.770000   -0.785000
                  0.000000    1.043324    0.959789    0.876254    0.790510    0.701416    0.612323    0.523229   0.434486    0.346857    0.259229    0.181441    0.100746    0.019060   -0.062627   -0.144314
                 20.000000    1.296359    1.308577    1.320796    1.331482    1.337490    1.339660    1.329172   1.310058    1.282226    1.254393    1.220396    1.178657    1.125667    1.071169    0.987634
                 40.000000    0.903250    0.935500    0.967750    1.000000    1.033000    1.066000    1.099000   1.132000    1.165000    1.198000    1.227137    1.248549    1.269961    1.291373    1.304505
                 60.000000    0.441750    0.484500    0.527250    0.570000    0.602250    0.634500    0.666750   0.699000    0.731250    0.763500    0.795750    0.828000    0.860250    0.892500    0.924750
                 80.000000   -0.108000   -0.072000   -0.036000    0.000000    0.042750    0.085500    0.128250   0.171000    0.213750    0.256500    0.299250    0.342000    0.384750    0.427500    0.470250
                100.000000   -0.536250   -0.517500   -0.498750   -0.480000   -0.444000   -0.408000   -0.372000  -0.336000   -0.300000   -0.264000   -0.228000   -0.192000   -0.156000   -0.120000   -0.084000
                120.000000   -0.723250   -0.725500   -0.727750   -0.730000   -0.711250   -0.692500   -0.673750  -0.655000   -0.636250   -0.617500   -0.598750   -0.580000   -0.561250   -0.542500   -0.523750
                140.000000   -0.619000   -0.646000   -0.673000   -0.700000   -0.702250   -0.704500   -0.706750  -0.709000   -0.711250   -0.713500   -0.715750   -0.718000   -0.720250   -0.722500   -0.724750
                160.000000   -0.341000   -0.434000   -0.527000   -0.620000   -0.605000   -0.590000   -0.575000  -0.560000   -0.545000   -0.530000   -0.529000   -0.556000   -0.583000   -0.610000   -0.637000
                180.000000    0.594000    0.606000    0.618000    0.630000    0.535500    0.441000    0.346500   0.252000    0.157500    0.063000   -0.031000   -0.124000   -0.217000   -0.310000   -0.403000
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            </tableData>
          </table>
        </product>
      </function>

      <function name="aero/coefficient/CL_stall_correction">
        <description>Lift_at_zero_lift</description>
        <product>
          <property>aero/qbar-psf</property>
          <property>metrics/Sw-sqft</property>
          <table>
            <independentVar lookup="row">aero/alpha-eff-deg</independentVar>
            <tableData>
               10.   0.
               12.  -0.2  <!-- generates wanted pitch oscillation near stall (see also "Pitch") -->
               30.   0.
            </tableData>
          </table>
        </product>
      </function>

    </axis>


    <function name="aero/coefficient/CD_adjustGlideRatio">
      <description>additional drag to obtain requested glide ratio</description>
        <!-- CD0 = -0.03   <= original value from UIUC
             additional drag changes glide ratio; -0.03 := glide ratio 14.15
             (max. glide ratio derived from ca(table above)/cd(table below) at 5deg
        -->
      <sum>
        <quotient>
          <value>0.731114</value>
          <property>aero/max-glide-ratio</property>
        </quotient>
        <value>-0.081704</value>
      </sum>
    </function>

    <axis name="DRAG">
      <function name="aero/coefficient/CDalpha">
        <description>Drag_at_zero_lift</description>
        <product>
          <property>aero/qbar-psf</property>
          <property>metrics/Sw-sqft</property>
          <sum>
            <property>aero/coefficient/CD_adjustGlideRatio</property>
            <table>
              <independentVar
              lookup="row">aero/alpha-eff-deg</independentVar>

              <independentVar
              lookup="column">fcs/elevator-pos-deg</independentVar>

              <tableData>
                                -1.05       -0.9        -0.75       -0.60       -0.45       -0.30       -0.15        0.0         0.15        0.30        0.45        0.60        0.75        0.90        1.05
               -180.000000       0.390000    0.360000    0.330000    0.300000    0.270000    0.240000    0.210000    0.180000    0.150000    0.120000    0.110000    0.140000    0.170000    0.200000    0.230000
               -160.000000       0.790000    0.760000    0.730000    0.700000    0.670000    0.640000    0.610000    0.580000    0.550000    0.520000    0.490000    0.460000    0.430000    0.400000    0.370000
               -140.000000       1.151333    1.125333    1.099333    1.073333    1.047333    1.021333    0.995333    0.969333    0.943333    0.917333    0.890000    0.860000    0.830000    0.800000    0.770000
               -120.000000       1.438000    1.432000    1.426000    1.420000    1.394000    1.368000    1.342000    1.316000    1.290000    1.264000    1.238000    1.212000    1.186000    1.160000    1.134000
               -100.000000       1.482000    1.488000    1.494000    1.500000    1.494000    1.488000    1.482000    1.476000    1.470000    1.464000    1.458000    1.452000    1.446000    1.440000    1.434000
                -80.000000       1.342000    1.368000    1.394000    1.420000    1.426000    1.432000    1.438000    1.444000    1.450000    1.456000    1.462000    1.468000    1.474000    1.480000    1.486000
                -60.000000       0.995333    1.021333    1.047333    1.073333    1.099333    1.125333    1.151333    1.177333    1.203333    1.229333    1.255333    1.281333    1.307333    1.333333    1.359333
                -40.000000       0.500371    0.541712    0.583053    0.624394    0.665735    0.707076    0.748417    0.789758    0.831098    0.872439    0.908667    0.934667    0.960667    0.986667    1.012667
                -20.000000       0.084160    0.092207    0.104342    0.116477    0.149692    0.170362    0.197205    0.238546    0.279887    0.321228    0.362568    0.403909    0.445250    0.486591    0.527932
                  0.000000       0.137795    0.112110    0.093657    0.086485    0.079314    0.072696    0.070450    0.068205    0.067578    0.069329    0.071079    0.074363    0.078562    0.082760    0.088162
                 20.000000       0.720747    0.671860    0.622973    0.574086    0.525198    0.476311    0.427424    0.378537    0.333072    0.291113    0.251297    0.213670    0.176042    0.147221    0.118998
                 40.000000       1.151333    1.125333    1.099333    1.073333    1.047333    1.021333    0.995333    0.969333    0.943333    0.917333    0.883704    0.834817    0.785930    0.737043    0.688156
                 60.000000       1.438000    1.432000    1.426000    1.420000    1.394000    1.368000    1.342000    1.316000    1.290000    1.264000    1.238000    1.212000    1.186000    1.160000    1.134000
                 80.000000       1.482000    1.488000    1.494000    1.500000    1.494000    1.488000    1.482000    1.476000    1.470000    1.464000    1.458000    1.452000    1.446000    1.440000    1.434000
                100.000000       1.342000    1.368000    1.394000    1.420000    1.426000    1.432000    1.438000    1.444000    1.450000    1.456000    1.462000    1.468000    1.474000    1.480000    1.486000
                120.000000       0.995333    1.021333    1.047333    1.073333    1.099333    1.125333    1.151333    1.177333    1.203333    1.229333    1.255333    1.281333    1.307333    1.333333    1.359333
                140.000000       0.610000    0.640000    0.670000    0.700000    0.730000    0.760000    0.790000    0.820000    0.850000    0.880000    0.908667    0.934667    0.960667    0.986667    1.012667
                160.000000       0.210000    0.240000    0.270000    0.300000    0.330000    0.360000    0.390000    0.420000    0.450000    0.480000    0.510000    0.540000    0.570000    0.600000    0.630000
                180.000000       0.390000    0.360000    0.330000    0.300000    0.270000    0.240000    0.210000    0.180000    0.150000    0.120000    0.110000    0.140000    0.170000    0.200000    0.230000
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              </tableData>
            </table>
          </sum>
        </product>
      </function>

    </axis>

    <axis name="SIDE">
      <function name="aero/coefficient/CYb">
        <description>Side_force_due_to_beta</description>
        <product>
          <property>aero/qbar-psf</property>
          <property>metrics/Sw-sqft</property>
          <property>aero/beta-eff-rad</property>
          <value>-0.6</value>
        </product>
      </function>

      <function name="aero/coefficient/CYp">
        <description>Side_force_due_to_roll_rate</description>
        <product>
          <property>aero/qbar-psf</property>
          <property>metrics/Sw-sqft</property>
          <property>aero/bi2vel</property>
          <property>velocities/p-aero-rad_sec</property>
          <value>-0.2</value>  <!-- checked  -->
        </product>
      </function>

      <function name="aero/coefficient/CYr">
        <description>Side_force_due_to_yaw_rate</description>
        <product>
          <property>aero/qbar-psf</property>
          <property>metrics/Sw-sqft</property>
          <property>aero/bi2vel</property>
          <property>velocities/r-aero-rad_sec</property>
          <value>0.4</value>
        </product>
      </function>

    </axis>

    <axis name="ROLL">

      <function name="aero/coefficient/Clb">
        <description>Roll_moment_due_to_beta</description>
        <product>
          <property>aero/qbar-psf</property>
          <property>metrics/Sw-sqft</property>
          <property>metrics/bw-ft</property>
          <property>aero/beta-eff-rad</property>
          <value>-0.08</value>
        </product>
      </function>

      <function name="aero/coefficient/Clp">
        <description>Roll_moment_due_to_roll_rate</description>
        <product>
          <property>aero/qbar-psf</property>
          <property>metrics/Sw-sqft</property>
          <property>metrics/bw-ft</property>
          <property>aero/bi2vel</property>
          <property>velocities/p-aero-rad_sec</property>
          <value>-0.5</value>
        </product>
      </function>

      <function name="aero/coefficient/Clr">
        <description>Roll_moment_due_to_yaw_rate</description>
        <product>
          <property>aero/qbar-psf</property>
          <property>metrics/Sw-sqft</property>
          <property>metrics/bw-ft</property>
          <property>aero/bi2vel</property>
          <property>velocities/r-aero-rad_sec</property>
          <value>0.06</value>  <!-- + = rollt beim Schieben in die Schieberichtung => Verstaerkung.  -->
        </product>
      </function>

      <function name="aero/coefficient/Clda">
        <description>Roll_moment_due_to_aileron</description>
        <product>
          <property>aero/qbar-psf</property>
          <property>metrics/Sw-sqft</property>
          <property>metrics/bw-ft</property>
          <property>fcs/left-aileron-pos-rad</property>
          <value>0.10</value> <!-- uiuc -0.15 -->
        </product>
      </function>

    </axis>

    <axis name="PITCH">

      <function name="aero/coefficient/Cmalpha">
        <description>Pitch_moment_due_to_alpha</description>
        <product>
          <property>aero/qbar-psf</property>
          <property>metrics/Sw-sqft</property>
          <property>metrics/cbarw-ft</property>
          <table>
            <independentVar
            lookup="row">aero/alpha-eff-deg</independentVar>

            <independentVar
            lookup="column">fcs/elevator-pos-deg</independentVar>

            <tableData>
                              -1.05       -0.90       -0.75       -0.60       -0.45       -0.30       -0.15        0.0         0.15        0.30        0.45        0.60        0.75        0.90        1.05
             -180.000000       0.039583    0.031074    0.022132    0.012848    0.014073    0.011427    0.004916   -0.005435   -0.019576   -0.037438   -0.068701   -0.123073   -0.181083   -0.242809   -0.308309
             -160.000000       0.065053    0.110564    0.154790    0.197761    0.224513    0.250085    0.274524    0.297878    0.320201    0.341552    0.352446    0.343766    0.334873    0.325856    0.316801
             -140.000000      -0.047721   -0.005186    0.036355    0.076915    0.116512    0.155167    0.192907    0.229760    0.265759    0.300940    0.336689    0.374089    0.410325    0.445430    0.479442
             -120.000000      -0.089627   -0.047506   -0.005627    0.036025    0.084563    0.132170    0.178888    0.224761    0.269838    0.314170    0.355573    0.391664    0.426847    0.461136    0.494552
             -100.000000      -0.095672   -0.050077   -0.004284    0.041710    0.091742    0.141516    0.191042    0.240331    0.289396    0.338250    0.384531    0.425879    0.467059    0.508086    0.548977
              -80.000000      -0.075585   -0.036046    0.004388    0.045743    0.091438    0.137338    0.183448    0.229776    0.276324    0.323099    0.370103    0.417341    0.464816    0.512528    0.560479
              -60.000000      -0.064672   -0.022412    0.019938    0.062467    0.099097    0.136423    0.174493    0.213353    0.253044    0.293606    0.336449    0.382978    0.430472    0.478954    0.528443
              -40.000000      -0.205686   -0.174247   -0.141735   -0.108069   -0.056760   -0.005534    0.045740    0.097190    0.148945    0.201134    0.250925    0.295177    0.339745    0.384712    0.430164
              -20.000000      -0.020944   -0.043188   -0.054684   -0.063577   -0.065075   -0.069311   -0.067308   -0.046160   -0.022131    0.003658    0.035511    0.077236    0.120200    0.164480    0.210141
                0.000000       0.161783    0.122999    0.091134    0.067993    0.047350    0.030054    0.018179    0.009489    0.004887    0.004727    0.005634    0.006065    0.010043    0.017087    0.027805
               20.000000       0.168354    0.138317    0.106103    0.059267    0.013490   -0.031216   -0.073750   -0.114151   -0.150375   -0.183527   -0.213262   -0.239001   -0.260670   -0.275847   -0.281394
               40.000000       0.083948    0.042155    0.000640   -0.040678   -0.082080   -0.123458   -0.164898   -0.206480   -0.248286   -0.290396   -0.331370   -0.369210   -0.406786   -0.444218   -0.469713
               60.000000       0.066026    0.021122   -0.023759   -0.068701   -0.116554   -0.163839   -0.210622   -0.256974   -0.302966   -0.348672   -0.392918   -0.434533   -0.476094   -0.517681   -0.559374
               80.000000       0.047420    0.005146   -0.037044   -0.079211   -0.127157   -0.174713   -0.221961   -0.268987   -0.315873   -0.362707   -0.409575   -0.456561   -0.503751   -0.551228   -0.599077
              100.000000      -0.029927   -0.062648   -0.095929   -0.129801   -0.173812   -0.217502   -0.260927   -0.304144   -0.347212   -0.390190   -0.433262   -0.476615   -0.520058   -0.563650   -0.607451
              120.000000      -0.192292   -0.213150   -0.234971   -0.257760   -0.292295   -0.327182   -0.362470   -0.398209   -0.434444   -0.471218   -0.508572   -0.546545   -0.585169   -0.624477   -0.664496
              140.000000      -0.413717   -0.434223   -0.456411   -0.480306   -0.495345   -0.511246   -0.528054   -0.545812   -0.564555   -0.584316   -0.607217   -0.635309   -0.664376   -0.694420   -0.725437
              160.000000      -0.112828   -0.137297   -0.165307   -0.196949   -0.262290   -0.327357   -0.392236   -0.457019   -0.521796   -0.586658   -0.640819   -0.674423   -0.709741   -0.746793   -0.785593
              180.000000       0.039583    0.031073    0.022132    0.012848    0.014073    0.011427    0.004916   -0.005435   -0.019576   -0.037438   -0.068701   -0.123073   -0.181083   -0.242809   -0.308309
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            </tableData>
          </table>

        </product>
      </function>

      <function name="aero/coefficient/Cmq">
        <description>Pitch_moment_due_to_pitch_rate</description>
        <product>
          <property>aero/qbar-psf</property>
          <property>metrics/Sw-sqft</property>
          <property>metrics/cbarw-ft</property>
          <property>aero/ci2vel</property>
          <property>velocities/q-aero-rad_sec</property>
          <value>-3.2</value> <!-- UIUC -5.2 -->
        </product>
      </function>

      <function name="aero/coefficient/Cm_stall_empirical">
        <description>Pitch_moment_modification_for_stall_and_tumbling</description>
        <product>
          <property>aero/qbar-psf</property>
          <property>metrics/Sw-sqft</property>
          <property>metrics/cbarw-ft</property>
          <table>
            <independentVar lookup="row">aero/alpha-eff-deg</independentVar>
            <tableData>
              -180.    0.
              -150.   -0.8
               -90.   -0.9
               -60.   -0.8
               -15.    0.
                10.    0.
                12.   -0.4  <!-- generates wanted pitch oscillation near stall (see also "Lift") -->
                90.   -0.9
               150.   -0.8
               180.    0.
            </tableData>
          </table>
          <table>
            <!-- switch off for upright pilot = original UIUC stall behaviour (needed for pronounced landing flares) -->
            <independentVar lookup="row">/controls/flight/elevator-trim</independentVar>
            <tableData>
              -0.05 0.
               0.   1.
               0.05 1.
            </tableData>
          </table>
        </product>
      </function>

    </axis>

    <axis name="YAW">

      <function name="aero/coefficient/Cnb">
        <description>Yaw_moment_due_to_beta</description>
        <product>
          <property>aero/qbar-psf</property>
          <property>metrics/Sw-sqft</property>
          <property>metrics/bw-ft</property>
          <property>aero/beta-eff-rad</property>
          <value>0.10</value>
        </product>
      </function>

      <function name="aero/coefficient/Cnp">
        <description>Yaw_moment_due_to_roll_rate</description>
        <product>
          <property>aero/qbar-psf</property>
          <property>metrics/Sw-sqft</property>
          <property>metrics/bw-ft</property>
          <property>aero/bi2vel</property>
          <property>velocities/p-aero-rad_sec</property>
          <value>-0.06</value>
        </product>
      </function>

      <function name="aero/coefficient/Cnr">
        <description>Yaw_moment_due_to_yaw_rate</description>
        <product>
          <property>aero/qbar-psf</property>
          <property>metrics/Sw-sqft</property>
          <property>metrics/bw-ft</property>
          <property>aero/bi2vel</property>
          <property>velocities/r-aero-rad_sec</property>
          <value>-0.08</value>
        </product>
      </function>

      <function name="aero/coefficient/Cnda">
        <description>Adverse_yaw</description>
        <product>
          <property>aero/qbar-psf</property>
          <property>metrics/Sw-sqft</property>
          <property>metrics/bw-ft</property>
          <property>fcs/left-aileron-pos-rad</property>
          <value>0.001</value> <!-- different sign in UIUC -->
        </product>
      </function>

    </axis>

  </aerodynamics>

  <system file="GroundHandling"/>
  <system file="Wheels"/>
  <system file="Kingpost"/>
  <system file="GenericEngine"/>

</fdm_config>
